// COMSOL Multiphysics 5.1.0.145 model "Linear Plate bending.mph"
// Outline of the model tree

Parameters
  P = 0[N/m^2]  // Pressure
  a = 1.5[m]
  b = 1[m]

Geometry
  geom1 "Geometry 1" (2D, length unit m)
    r1: Rectangle | size = {a, b}
    pt1: Point | p = {a/2, b/2}
    fin: Finalize "Form Union"

Materials
  mat1: Common "Material 1" on all domains
    def "Basic"
      youngsmodulus = 10920
      poissonsratio = 0.3
      density = 1200

Physics
  plate: Plate on all domains
    dependent variable u = {u, v, w}
    StructuralTransientBehavior.StructuralTransientBehavior = Quasistatic
    d.d = 0.1[m]
    Use3DFormulation.Use3DFormulation = 1
    UseMITCInterp.UseMITCInterp = 1
    z.z = 1
    emm1: Elastic "Linear Elastic Material 1" (default)
    free1: Free (default)
    init1: init "Initial Values 1" (default)
    pdr11: DispRot1 "Prescribed Displacement/Rotation 11" on boundaries 2, 3
      Direction = {1, 1, 1}
      RotationType = FreeGroup
      FreeRotationAround = {1, 0, 1}
    pdr12: DispRot1 "Prescribed Displacement/Rotation 12" on boundaries 1, 4
      Direction = {1, 1, 1}
      RotationType = FreeGroup
      FreeRotationAround = {0, 1, 1}
    fl1: FaceLoad on domains 1 | Ff = {0, 0, -P}
    fix1: Fixed "Fixed Constraint 1" (disabled) on boundaries 1-4

Mesh
  mesh1 "Mesh 1" (physics-controlled)
    size: MeshSizeDefault | hauto = 5

Studies
  std1 "Study 1"
    stat: Stationary | useparam = on; pname = P; plistarr = range(0,1,10)

Solver configurations
  sol1 "Solution 1" (study std1)
    v1: Variables "Dependent Variables 1"
    s1: Stationary "Stationary Solver 1"
      dDef: Direct
      p1: Parametric
      fc1: FullyCoupled | linsolver = dDef; termonres = auto; reserrfact = 1000

Datasets
  dset1: Solution | solution = sol1

Plots
  pg1: PlotGroup2D "Stress Top (plate)" | data = dset1
    surf1: Surface | expr = w
      hght: Height "Height Expression" | expr = 1
  pg2: PlotGroup1D "1D Plot Group 2" | data = dset1; xlabel = -P
    ptgr1: PointGraph on points 3 | expr = -w